[
    144, 182, 196, 190;
    100, 220, 283, 273;
    60, 300, 469, 452;
    30, 400, 822, 887;
    16, 400, 1261, 1614;
    8, 400, 1813, 3000
]
speed := 20  # кмч
r := 26*2.54/2*1/100 = 0.3302  # м
n := speed/3.6/(2*π*r) = 2.67775
step := 360*n/450 = 2.1422
step/180*π*r = 0.0123457
